** =================================================================
** 1. MODEL HEADING
** =================================================================
*Heading
3D Nonuniform Growth Validation - h=1/50, 320x1x16 C3D20H mesh
*Preprint, echo=NO, model=NO, history=NO, contact=NO
** UMAT: umat_growth_nh_penalty_nonuniform_C3D20H.for
** Kinematics: A = F * G^(-1)
** Growth tensor: G = diag(g(X,Z),1,1)
** g(X,Z) = lambda_G*exp[kappa(X)*Z]
** kappa(X) = kappa0*sin(2*pi*X/L)
** Formulation: Compressible / nearly incompressible neo-Hookean UMAT with C3D20H
** Hybrid quadratic element; no C3D8R hourglass control
** =================================================================
** 2. THREE-DIMENSIONAL MESH
** =================================================================
** Geometry: X=[-1,1], Y=[-0.05,0.05], Z=[-0.02,0.02]
** Mesh: 320 x 1 x 16 parent elements
** Element type: C3D20H
*Node
1, -1.000000000000, -0.050000000000, -0.020000000000
2, -0.993750000000, -0.050000000000, -0.020000000000
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*Element, type=C3D20H, elset=ALLELEMENTS
1, 1, 2, 323, 322, 643, 644, 965, 964, 10915, 10916, 10917, 10918, 10919, 10920, 10921, 10922, 10923, 10924, 10925, 10926
2, 2, 3, 324, 323, 644, 645, 966, 965, 10927, 10928, 10929, 10916, 10930, 10931, 10932, 10920, 10924, 10933, 10934, 10925
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** =================================================================
** 3. NODE AND ELEMENT SETS
** =================================================================
*Nset, nset=ALLNODES, generate
1, 37523, 1
*Nset, nset=LEFT
1, 322, 643, 964, 1285, 1606
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*Nset, nset=RIGHT
321, 642, 963, 1284, 1605, 1926
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*Nset, nset=BOTTOM
1, 2, 3, 4, 5, 6
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*Nset, nset=MIDDLE
5137, 5138, 5139, 5140, 5141, 5142
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*Nset, nset=TOP
10273, 10274, 10275, 10276, 10277, 10278
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*Nset, nset=YMIN_FREE, unsorted
10915, 2, 10927, 3, 10935, 4
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*Nset, nset=YMAX_FREE, unsorted
10917, 323, 10929, 324, 10937, 325
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*Nset, nset=YMID_EDGE_FREE, unsorted
10916, 10928, 10936, 10944, 10952, 10960
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*Nset, nset=YMIN_VERTEX_FREE, unsorted
2, 3, 4, 5, 6, 7
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*Elset, elset=ELOWER, generate
1, 2560, 1
*Elset, elset=EUPPER, generate
2561, 5120, 1
** =================================================================
** 4. MATERIAL AND STATE-VARIABLE INITIALIZATION
** =================================================================
*Material, name=GROWTH_NH_PENALTY
** PROPS = E, nu, lambda_G, kappa0, L
*User Material, constants=5
2.999, 0.4995, 1.0, 2.0, 1.0
*Depvar
20
** Initialize reference coordinates through SDVINI
*Initial Conditions, type=SOLUTION, USER
** =================================================================
** 5. SOLID SECTION
** =================================================================
** C3D20H quadratic hybrid element; no C3D8R hourglass control is used.
*Solid Section, elset=ALLELEMENTS, material=GROWTH_NH_PENALTY
,
** =================================================================
** 6. BOUNDARY CONDITIONS
** =================================================================
** Plane-strain condition: U2 = 0 on every C3D20H node
*Boundary
ALLNODES, 2, 2, 0.0
** Left clamp: U1 = U3 = 0 on all nodes of X=-L face
*Boundary
LEFT, 1, 1, 0.0
LEFT, 3, 3, 0.0
** Pair y=-0.05 and y=+0.05 face nodes so U1,U3 are Y-independent
*Equation
2
YMIN_FREE, 1, 1.0, YMAX_FREE, 1, -1.0
*Equation
2
YMIN_FREE, 3, 1.0, YMAX_FREE, 3, -1.0
** C3D20H adds midside nodes on Y-directed edges; tie them to y-min vertices
*Equation
2
YMID_EDGE_FREE, 1, 1.0, YMIN_VERTEX_FREE, 1, -1.0
*Equation
2
YMID_EDGE_FREE, 3, 1.0, YMIN_VERTEX_FREE, 3, -1.0
** Right, top, and bottom surfaces are traction-free.
** =================================================================
** 7. STATIC ANALYSIS STEP
** =================================================================
*Step, name=GROWTH_STEP, nlgeom=YES, inc=3000
*Static
0.1, 10.0, 1.0E-06, 0.1
** =================================================================
** 8. OUTPUT REQUESTS
** =================================================================
*Output, field, number interval=100
*Node Output
U, RF
*Element Output, directions=YES
S, SDV
*Output, history, frequency=1
*Energy Output
ALLIE, ALLSE, ALLAE
*End Step
